θ := 58
r := 13
A := [1, 1, 1; 1, 1, 1; 1, 1, 1]
B := [1, 1, 1; 1, 1, 1; 1, 1, 1]
V1 := [2; 3; 1]
V2 := [1; 1; 1]  # V*[1; 2; 3]
φ := 27
x := r*sin(θ)*cos(φ) = -3.77074
q := transpose(V1)*V2 = 6
y := r*sin(θ)*sin(φ) = 12.3443
C1 := A + B = [2, 2, 2; 2, 2, 2; 2, 2, 2]
VM := sqrt(1^2 + 2^2 + 3^2) = 3.74166
z := r*cos(θ) = 1.54934
p := transpose(V1)*A*V2 = 18
V1*V2 = 6
C2 := A*B = [3, 3, 3; 3, 3, 3; 3, 3, 3]
V1×V2 = [2; -1; -1]
D := A*V1 = [6; 6; 6]
V1*V2/(|V1|*|V2|) = 0.92582
