А := [-2; -4]
В := [-3; 0]
C := [0; 4]
D := [3; 0]
E := [2; -4]
F := [-2; 0]
H := [2; 0]
xa := 100 + (400 - 100)/6*(-2 - 3) = -150
ya := 500 - (500 - 200)/8*(-4 - 4) = 800
Dw := [100, 200, 400, 500]
xk := xwl + (xhw - xlw)/(xh - xl)*(x - xl)  # error: Эта переменная не определена.
x3 := [-2; -2; -3; 0; 3; 2; 2; -2]
y3 := [-4; 0; 0; 4; 0; 0; -4; -4]
yk := ywh + (yhw - ylw)/(yh - yl)*(y - yl)  # error: Эта переменная не определена.
xw := [-150; -150; -200; -50; 100; 50; 50; -150]
yw := [800; 650; 650; 500; 650; 650; 800; 800]
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x2 := -6, -5.9 .. 6
f(x2) := sin(π*x2)*sqrt(|x2|)
f(x2) = [
    0; 0.7506; 1.41557; 1.9315; 2.25061; 2.34521; 2.21006; 1.8625; 1.34036; 0.697859
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]
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kx := (800 - 100)/12 = 58.3333
ky := (900 - 200)/(2.35*2) = 148.936
X(x2) :=
    xwl ← 100
    kx ← 58.333
    xl ← -6
    X ← xwl + kx*(x2 - xl)
    return X
Y(x2) :=
    y ← sin(π*x2)*sqrt(|x2|)
    ywh ← 900
    ky ← 148.936
    yl ← -2.35
    Y ← ywh - ky*(y - yl)
X(x2) = [
    100; 105.833; 111.667; 117.5; 123.333; 129.166; 135; 140.833; 146.666; 152.5
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]
Y(x2) = [
    550; 438.209; 339.17; 262.33; 214.803; 200.715; 220.844; 272.608; 350.373; 446.064
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]
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