A := [2; 12]
B := [5; 9]
C := [2; 3]
D := [5; 6]  # Найдем точку пересечения прямых AB, CD:
x := 0
y := 0
Given
X1 := [2; 5]
X2 := [2; 5]
Y1 := [12; 9]
Y2 := [3; 6]
y + x - 14 == 0
y - x - 1 == 0
PX := 6.5
Find(x, y) = [6.5; 7.5]
PY := 7.5
α := π
# Формулы для преобразований координат при повороте осей
Δx := 2*PX = 13
ΔY := 2*PY = 15
xn := x*cos(α) - y*sin(α)
yn := x*sin(α) + y*cos(α)
D := [cos(α), -sin(α), 0; sin(α), cos(α), 0; 0, 0, 1]*[3; 6; 1] = [-3; -6; 1]
X3 := [-2; -5]
X4 := [-2; -5]
Y3 := [-12; -9]
Y4 := [-3; -6]
D1 := [1, 0, PX; 0, 1, PY; 0, 0, 1]*[cos(α), sin(α), 0; -sin(α), cos(α), 0; 0, 0, 1]*[1, 0, -PX; 0, 1, -PY; 0, 0, 1] = [-1, 0, 13; 0, -1, 15; 0, 0, 1]
K := [1, 0, 13; 0, 1, 15; 0, 0, 1]*[-5; -9; 1] = [8; 6; 1]
X5 := [11; 8]
X6 := [11; 8]
Y5 := [3; 6]
Y6 := [12; 9]
D1*[5; 6; 1] = [8; 9; 1]
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