# Задание 1 | Задание 2,4
# Задать координаты вершин усеченной пирамиды (рис.1) в мировой декартовой системе координат  и положение камеры (наблюдателя) в мировой сферической системе координат
# МСК 10,315,45
# Построить изображение пирамиды без удаления невидимых граней, рис. 1а (использовать лекционный пример). Построенный рисунок должен моделировать изображение пирамиды в прямоугольной области окна Windows  с координатами:
# –x(lw),y(lw)=(200,100) оконные координаты левого верхнего угла области ;
# – x(hw),y(hw)=(700,500) оконные координаты правого нижнего угла
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[ι, φl, θ] := [10, 315, 45]
# Ход работы:
# Формируем матрицу координат вершин пирамиды:
a := [5; 0; 0; 1]
b := [0; 0; 0; 1]
c := [0; 5; 0; 1]
d := [0; 0; 10; 1]
PIR := [5, 0, 0, 0; 0, 0, 5, 0; 0, 0, 0, 10; 1, 1, 1, 1]
PVo := 10
PV1 := 315
PV := [10; 315; 45]
PV2 := 45  # Найдем сферические координаты точек наблюдения:
Rv := PVo = 10
φv := PV1/180*π = 5.49779
θv := PV2/180*π = 0.785398
# Задаем положение секущей плоскости в МСК XYZ
# -угол между осью z и вектором нормали к секущей плоскости
φgrad := 50
φ := φgrad/180*π = 0.872665
# -вектор нормали к секщей пллоскости
N := transpose([0; sin(φ); cos(φ)])
# - координаты точки пересечения оси Z и секущей плоскости
x0 := 0
y0 := 0
z0 := 2
# Задаем параметры уравнения секущей плоскости
N = [0, 0.766044, 0.642788]
B := 0.766
A := 0
C := 0.643
D := -(A*x0 + B*y0 + C*z0) = -1.286
[A; B; C] = [0; 0.766; 0.643]
# Находим точку пересечения P1 секущей плоскости с ребром AD
[x1; y1; z1] := submatrix(PIR, 0, 2, 0, 0) = [5; 0; 0]
[x2; y2; z2] := submatrix(PIR, 0, 2, 3, 3) = [0; 0; 10]
Δx := x2 - x1 = -5
Δy := y2 - y1 = 0
Δz := z2 - z1 = 10
tAD := -((A*x1 + B*y1 + C*z1 + D)/(A*Δx + B*Δy + C*Δz)) = 0.2
xAD := x1 + Δx*tAD = 4
yAD := y1 + Δy*tAD = 0
zAD := z1 + Δz*tAD = 2
# Находим точку пересечения P2 секущей плоскости с ребром CD
VCD1 := submatrix(PIR, 0, 2, 2, 2) = [0; 5; 0]
VCD2 := submatrix(PIR, 0, 2, 3, 3) = [0; 0; 10]
ΔVCD := VCD2 - VCD1 = [0; -5; 10]
tCD := -((N*VCD1 + D)/(N*ΔVCD)) = -0.979431
VCD := VCD1 + ΔVCD*tCD = [0; 9.89715; -9.79431]
xCD := 0
yCD := 3.09
CD := VCD = [0; 9.89715; -9.79431]
zCD := 3.82
# Находим точку пересечения P3 секущей плоскости с ребром BD
PIR1 := [A, B, C, D; 5, 0, 0, 0; 0, 0, 5, 0; 0, 0, 0, 10; 1, 1, 1, 1]
VBD1 := submatrix(PIR, 0, 2, 1, 1) = [0; 0; 0]
VBD2 := submatrix(PIR, 0, 2, 3, 3) = [0; 0; 10]
ΔVBD := VBD2 - VBD1 = [0; 0; 10]
tBD := -((N*VBD1 + D)/(N*ΔVBD)) = 0.200066
xBD := 0
VBD := VBD1 + ΔVBD*tBD = [0; 0; 2.00066]
yBD := 0
zBD := 7.502
# Получаем матрицу мировых координат точек P1,P2,P3
TR := [xAD, xCD, xBD; yAD, yCD, yBD; zAD, zCD, zBD; 1, 1, 1] = [4, 0, 0; 0, 3.09, 0; 2, 3.82, 7.502; 1, 1, 1]
# Задание 3
xLW := 200
yLW := 100
xHW := 700
yHW := 500
# Построить изображение пирамиды с удалением невидимых граней, рис. 1б (использовать лекционный пример). Построенный рисунок должен моделировать изображение пирамиды в прямоугольной области окна Windows  с координатами:
# –x(lw),y(lw)=(200,100)  оконные координаты левого верхнего угла области ;
# – x(hw),y(hw)=(700,500) оконные координаты правого нижнего угла области ;
# Формируем матрицу пересчета мировых координат в видовые
kVIEW := [
    -sin(φv), cos(φv), 0, 0;
    -sin(θv)*cos(θv), -cos(θv)*sin(φv), sin(θv), 0;
    -sin(θv)*cos(φv), -sin(φv)*sin(φv), -cos(θv), Rv;
    0, 0, 0, 1
] = [0.707107, 0.707107, 0, 0; -0.5, 0.5, 0.707107, 0; -0.5, -0.5, -0.707107, 10; 0, 0, 0, 1]
# Во втором задании мы уже сформировани матрицу координат PIR и сформировали
# матрицу пересчета из мировые в видовые kVIEW.Вычисляем координаты вершин пирамиды в видовой системе координат PIR_V
# Вычисляем координаты вершин пирамиды в видовой системе координат:
PIR_V := kVIEW*PIR = [3.53553, 0, 3.53553, 0; -2.5, 0, 2.5, 7.07107; 7.5, 10, 7.5, 2.92893; 1, 1, 1, 1]
# Вычислим координатты проекций на картинную плоскость
# Вычисляем координаты вершин треугольника сечения Р1,Р2,Р3
# в видовой системе координат в видовой системе координат:
XV := transpose(PIR_V)[:, 0] = [3.53553; 0; 3.53553; 0]
YV := transpose(PIR_V)[:, 1] = [-2.5; 0; 2.5; 7.07107]
TR_V := kVIEW*TR = [2.82843, 2.18496, 0; -0.585786, 4.24615, 5.30472; 6.58579, 5.75385, 4.69528; 1, 1, 1]
IV := transpose(PIR_V)[:, 3] = [1; 1; 1; 1]  # Вычисляем координаты проекции вершин пирамиды на картинную плоскость
pXY := stack(transpose(transpose(PIR_V)[:, 0]), transpose(transpose(PIR_V)[:, 1]), transpose(transpose(PIR_V)[:, 3])) = [3.53553, 0, 3.53553, 0; -2.5, 0, 2.5, 7.07107; 1, 1, 1, 1]
# Формируем матрицу из координат проекций вершин пирамиды на картинную плоскость
# Определяем координаты проекции вершин треугольника сечени Р1,Р2,Р3 на картинную плоскость
pXY3 := stack(transpose(XV), transpose(YV), transpose(IV)) = [3.53553, 0, 3.53553, 0; -2.5, 0, 2.5, 7.07107; 1, 1, 1, 1]
trXY := stack(transpose(transpose(TR_V)[:, 0]), transpose(transpose(TR_V)[:, 1]), transpose(transpose(TR_V)[:, 3])) = [2.82843, 2.18496, 0; -0.585786, 4.24615, 5.30472; 1, 1, 1]
# Определяем габаритную область проекции пирамиды на плоскость xvyv видовой ск- картинную плоскость
# Определяем габаритную область проекции пирамиды на плоскость xyz вск- картинную плоскость
# левый верхний угол | нижний правый угол | Левый верхний угол
xH3 := max(XV) = 3.53553
xL3 := min(XV) = 0
yL3 := min(YV) = -2.5
xL := min(transpose(pXY)[:, 0]) = 0
yH := max(transpose(pXY)[:, 1]) = 7.07107
yH3 := max(YV) = 7.07107
# правый нижний угол
# Вычисляем параметры необходимые для формирования матрицы пересчета координатИЗ
# ПЛОСКОСТИ xvyv видовой ск- картинную плоскость
yL := min(transpose(pXY)[:, 1]) = -2.5
xH := max(transpose(pXY)[:, 0]) = 3.53553
ΔxW3 := xHW - xLW = 500
# Вычисляем параметры необходимые для формирования матрицы пересчета координат из плоскости ху вск в оск
ΔX3 := xH3 - xL3 = 3.53553
ΔxW := xHW - xLW = 500
ΔyW3 := yHW - yLW = 400
ΔX := xH - xL = 3.53553
ΔY3 := yH3 - yL3 = 9.57107
ΔyW := yHW - yLW = 400
ΔY := yH - yL = 9.57107
kX3 := ΔxW3/ΔX3 = 141.421
kX := ΔxW/ΔX = 141.421
kY3 := ΔyW3/ΔY3 = 41.7926
kY := ΔyW/ΔY = 41.7926
# Маьртца пересчета из вск в оск
tSW := [kX, 0, xLW - kX*xL; 0, -kY, yHW + kY*yL; 0, 0, 1] = [141.421, 0, 200; 0, -41.7926, 395.518; 0, 0, 1]
tSW3 := [kX3, 0, xLW - kX3*xL3; 0, -kY3, yHW + kY3*yL3; 0, 0, 1] = [141.421, 0, 200; 0, -41.7926, 395.518; 0, 0, 1]
# Вычисляем оконные координаты вершин пирамиды
# Вычисляем оконные координаты вершин пирамиды
mW := tSW*pXY = [700, 200, 700, 200; 500, 395.518, 291.037, 100; 1, 1, 1, 1]
mW3 := tSW3*pXY3 = [700, 200, 700, 200; 500, 395.518, 291.037, 100; 1, 1, 1, 1]
[xA, xB, xC, xD; yA, yB, yC, yD; q, q, q, q] := vectorize(round(mW))
[xA3, xB3, xC3, xD3; yA3, yB3, yC3, yD3; q3, q3, q3, q3] := vectorize(round(mW3))
XN := transpose([xA, xB, xC, xA, xD, xB, xD, xC])
[xA3, xB3, xC3, xD3; yA3, yB3, yC3, yD3; q3, q3, q3, q3] = [700, 200, 700, 200; 500, 396, 291, 100; 1, 1, 1, 1]
YN := -transpose([yA, yB, yC, yA, yD, yB, yD, yC])
# Вычисляем декарт координаты камеры
# Вычисляем оконные координаты вершин треугольника сечения Р1 Р2 Р3
rC := [Rv*sin(θv)*cos(φv); Rv*sin(θv)*sin(φv); Rv*cos(θv)] = [5; -5; 7.07107]
trW := tSW*trXY = [600, 509, 200; 420, 218.061, 173.821; 1, 1, 1]
PIR1 := [A, B, C, D; 5, 0, 0, 0; 0, 0, 5, 0; 0, 0, 0, 10; 1, 1, 1, 1]
[xP1, xP2, xP3; yP1, yP2, yP3; q, q, q] := vectorize(round(trW))
# Вычисляем декартовы координаты вектора внешней нормали к каждой грани пирамидs
XC := transpose([xP1, xP2, xP3, xP1])
C0 := 0
C1 := 5
C2 := 0
YC := -transpose([yP1, yP2, yP3, yP1])
A0 := 5
A1 := 0
A2 := 0
D2 := 10
D0 := 0
D1 := 0
AC3 := [C0; C1; C2] - [A0; A1; A2] = [-5; 5; 0]
AD3 := [D0; D1; D2] - [A0; A1; A2] = [-5; 0; 10]
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NADC := AC3×AD3 = [50; 50; 25]
NADB := [0; -1; 0]
NABC := [0; 0; -1]
NBDC := [-1; 0; 0]
# ОПРЕДЕЛИИМ ВИДИМОСТЬ ГРАНИЦ
q1 := rC*NADC = 176.777
X3 := transpose([xA3, xD3, xC3, xA3, xB3, xD3])
# ADC VIDIMA
q2 := rC*NADB = 5
Y3 := -transpose([yA3, yD3, yC3, yA3, yB3, yD3])
# ADB VIDIMA
q3 := rC*NBDC = -5
# BDC NE VIDIMA
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q4 := rC*NABC = -7.07107
# ABC NE VIDIMA
