# Полином Лагранжа
x := transpose([132, 141, 150, 162, 170, 180])
Задание
# Построить интерполяционный многочлен Лагранжа для функции, заданной таблично, построить графики полученного многочлена Лагранжа функции, заданной таблично, многочлена n-ой степени и функции
y := transpose([330, 350, 385, 425, 450, 485])
n := rows(x) - 1
n = 5
i := 0 .. n
j := 0 .. n
f(v) := sum(y[i]*product(if(i == j, 1, (v - x[j])/(x[i] - x[j])), j), i)
# Интерполяция – в вычислительной математике способ нахождения промежуточных значений величины по имеющемуся дискретному набору известных значений
2.
M[j, i] := x[j]^i
a := M^-1*y
M = [
    1, 132, 17424, 2299968, 303595776, 40074642432;
    1, 141, 19881, 2803221, 395254161, 55730836701;
    1, 150, 22500, 3375000, 506250000, 75937500000;
    1, 162, 26244, 4251528, 688747536, 111577100832;
    1, 170, 28900, 4913000, 835210000, 141985700000;
    1, 180, 32400, 5832000, 1049760000, 188956800000
]
a = [237166; -7433.13; 92.894; -0.578199; 0.0017934; -2.21777e-6]
3.
k := 0 .. n
P(z) := sum(a[k]*z^k, k)
P(132) = 330
P(156) = 406.151
2*sposob
lagrang(x, y, q) :=
    n ← rows(x) - 1
    f ← 0
    for i ∈ 0 .. n
        p ← 1
        for j ∈ 0 .. n
            p ← p*(q - x[j])/(x[i] - x[j]) if j ≠ i
        f ← f + y[i]*p
    f
q := 156
lagrang(x, y, q) = 406.151
q := 130, 132 .. 182
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4.
