# Вариант 5
r := 1
θ := 3
Например
# Перевод из мировых в оконные:
D(800, 200, 500, 700)
μ := 2
xlw := 500
yhw := 200
x := r*sin(θ)*cos(μ) = -0.0587266
xhw := 800
ylw := 700
y := r*sin(θ)*sin(μ) = 0.12832
z := r*cos(θ) = -0.989992
xk := xlw + (xhw - xlw)/(xh - xl)*(x - xl)  # error: Эта переменная не определена.  # Где область D(xhw, yhw, xlw, ylw)
A := [4; 2]
B := [6; 4]
C := [6; 2]
# Так же точки xh,xl,yh, ylсмотреть по графику
yk := yhw + (yhw - ylw)/(yh - yl)*(y - yl)  # error: Эта переменная не определена.
X := [4; 6; 6; 4]
Y := [2; 4; 2; 2]
# точки х,у это координаты самой точки, которую нужно перевести
PX := 6
PY := 4
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XN := [6; 4; 6; 6]
YN := [3; 5; 5; 3]
α := -π/2
D := [1, 0, PX; 0, 1, PY; 0, 0, 1]*[cos(α), sin(α), 0; -sin(α), cos(α), 0; 0, 0, 1]*[1, 0, 1; 0, 1, 2; 0, 0, 1]*[1, 0, -PX; 0, 1, -PY; 0, 0, 1] = [0, -1, 8; 1, 0, -1; 0, 0, 1]
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D*[1, 0, 1; 0, 1, 2; 0, 0, 1] = [0, -1, 6; 1, 0, 0; 0, 0, 1]
KA := [6; 3]
K2 := [0, -1, 8; 1, 0, -1; 0, 0, 1]*[6; 4; 1] = [4; 5; 1]
K1 := [0, -1, 8; 1, 0, -1; 0, 0, 1]*[4; 2; 1] = [6; 3; 1]
KB := [4; 5]
KC := [6; 5]
K3 := [0, -1, 8; 1, 0, -1; 0, 0, 1]*[6; 2; 1] = [6; 5; 1]
K4 := [0, -1, 8; 1, 0, -1; 0, 0, 1]*[4; 2; 1] = [6; 3; 1]
KA2 := [6; 3]
